// SBML level 3 version 1

model dex_body()
  // model units - substance: mmole, time: min, volume: litre, area: m2, length: m, extent: mmole

  // Compartments:
  compartment Vre; Vre has litre; Vre is "rest of body";
  compartment Vgu; Vgu has litre; Vgu is "gut";
  compartment Vki; Vki has litre; Vki is "kidney";
  compartment Vli; Vli has litre; Vli is "liver";
  compartment Vlu; Vlu has litre; Vlu is "lung";
  compartment Vsp; Vsp has litre; Vsp is "spleen";
  compartment Vpa; Vpa has litre; Vpa is "pancreas";
  compartment Vve; Vve has litre; Vve is "venous blood";
  compartment Var; Var has litre; Var is "arterial blood";
  compartment Vurine = 1 litre;
  compartment Vfeces = 1 litre;
  compartment Vpo; Vpo has litre; Vpo is "portal plasma";
  compartment Vhv; Vhv has litre; Vhv is "hepatic venous plasma";
  compartment Vgu_tissue; Vgu_tissue has litre;
  compartment Vgu_plasma; Vgu_plasma has litre;
  compartment Vki_tissue; Vki_tissue has litre;
  compartment Vki_plasma; Vki_plasma has litre;
  compartment Vli_tissue; Vli_tissue has litre;
  compartment Vli_plasma; Vli_plasma has litre;
  compartment Vlu_tissue; Vlu_tissue has litre;
  compartment Vlu_plasma; Vlu_plasma has litre;
  compartment Vpa_tissue; Vpa_tissue has litre;
  compartment Vpa_plasma; Vpa_plasma has litre;
  compartment Vsp_tissue; Vsp_tissue has litre;
  compartment Vsp_plasma; Vsp_plasma has litre;
  compartment Vre_tissue; Vre_tissue has litre;
  compartment Vre_plasma; Vre_plasma has litre;

  // Species:
  species Cgu_plasma_dex in Vgu_plasma = 0; Cgu_plasma_dex is "dextormethorphan (gut)";
  species Cki_plasma_dex in Vki_plasma = 0; Cki_plasma_dex is "dextormethorphan (kidney)";
  species Cli_plasma_dex in Vli_plasma = 0; Cli_plasma_dex is "dextormethorphan (liver)";
  species Clu_plasma_dex in Vlu_plasma = 0; Clu_plasma_dex is "dextormethorphan (lung)";
  species Cpa_plasma_dex in Vpa_plasma = 0; Cpa_plasma_dex is "dextormethorphan (pancreas)";
  species Csp_plasma_dex in Vsp_plasma = 0; Csp_plasma_dex is "dextormethorphan (spleen)";
  species Cre_plasma_dex in Vre_plasma = 0; Cre_plasma_dex is "dextormethorphan (rest)";
  species Car_dex in Var = 0; Car_dex is "dextormethorphan (arterial blood)";
  species Cve_dex in Vve = 0; Cve_dex is "dextormethorphan (venous blood)";
  species Cpo_dex in Vpo = 0; Cpo_dex is "dextormethorphan (portal vein)";
  species Chv_dex in Vhv = 0; Chv_dex is "dextormethorphan (hepatic vein)";
  substanceOnly species Aurine_dex in Vurine = 0; Aurine_dex is "dextormethorphan (urine)";
  substanceOnly species Afeces_dex in Vfeces = 0; Afeces_dex is "dextormethorphan (feces)";
  species Cgu_plasma_dor in Vgu_plasma = 0; Cgu_plasma_dor is "dextorphan (gut)";
  species Cki_plasma_dor in Vki_plasma = 0; Cki_plasma_dor is "dextorphan (kidney)";
  species Cli_plasma_dor in Vli_plasma = 0; Cli_plasma_dor is "dextorphan (liver)";
  species Clu_plasma_dor in Vlu_plasma = 0; Clu_plasma_dor is "dextorphan (lung)";
  species Cpa_plasma_dor in Vpa_plasma = 0; Cpa_plasma_dor is "dextorphan (pancreas)";
  species Csp_plasma_dor in Vsp_plasma = 0; Csp_plasma_dor is "dextorphan (spleen)";
  species Cre_plasma_dor in Vre_plasma = 0; Cre_plasma_dor is "dextorphan (rest)";
  species Car_dor in Var = 0; Car_dor is "dextorphan (arterial blood)";
  species Cve_dor in Vve = 0; Cve_dor is "dextorphan (venous blood)";
  species Cpo_dor in Vpo = 0; Cpo_dor is "dextorphan (portal vein)";
  species Chv_dor in Vhv = 0; Chv_dor is "dextorphan (hepatic vein)";
  substanceOnly species Aurine_dor in Vurine = 0; Aurine_dor is "dextorphan (urine)";
  species Cgu_tissue_dex in Vgu = 0; Cgu_tissue_dex is "dextormethorphan (gut)";
  species $LI__qui_ext in Vli_plasma = 0; LI__qui_ext is "quinidine";  // CHEBI:28593 ncit:C793 inchikey:LOUPRKONTZGTKE-LHHVKLHASA-N
  species LI__dex in Vli_tissue = 0; LI__dex is "dextormethorphan (liver)";  // CHEBI:4470 ncit:C62022 inchikey:MKXZASYAUGDDCJ-NJAFHUGGSA-N
  species LI__dor in Vli_tissue = 0; LI__dor is "dextrorphan (liver)";  // CHEBI:29133 ncit:C171857 inchikey:JAQUASYNZVUNQP-PVAVHDDUSA-N

  // Parameters:
  BW = 75 kg; BW is "body weight [kg]";
  HEIGHT = 170 cm; HEIGHT is "height [cm]";
  HR = 70 per_min; HR is "heart rate [1/min]";
  HRrest = 70 per_min; HRrest is "heart rate [1/min]";
  BSA has m2; BSA is "body surface area [m^2]";
  COBW = 1.548 ml_per_s_kg; COBW is "cardiac output per bodyweight [ml/s/kg]";
  CO has ml_per_s; CO is "cardiac output [ml/s]";
  QC has l_per_min; QC is "cardiac output [L/hr]";
  COHRI = 150 ml; COHRI is "increase of cardiac output per heartbeat [ml/min*min]";
  Fblood = 0.02 dimensionless; Fblood is "blood fraction of organ volume";
  HCT = 0.51 dimensionless; HCT is "hematocrit";
  FVgu = 0.0171 l_per_kg; FVgu is "gut fractional tissue volume";
  FVki = 0.0044 l_per_kg; FVki is "kidney fractional tissue volume";
  FVli = 0.021 l_per_kg; FVli is "liver fractional tissue volume";
  FVlu = 0.0076 l_per_kg; FVlu is "lung fractional tissue volume";
  FVsp = 0.0026 l_per_kg; FVsp is "spleen fractional tissue volume";
  FVpa = 0.01 l_per_kg; FVpa is "pancreas fractional tissue volume";
  FVre has l_per_kg; FVre is "rest of body fractional tissue volume";
  FVve = 0.0514 l_per_kg; FVve is "venous fractional tissue volume";
  FVar = 0.0257 l_per_kg; FVar is "arterial fractional tissue volume";
  FVpo = 0.001 l_per_kg; FVpo is "portal fractional tissue volume";
  FVhv = 0.001 l_per_kg; FVhv is "hepatic venous fractional tissue volume";
  FQgu = 0.146 dimensionless; FQgu is "gut fractional tissue blood flow";
  FQki = 0.19 dimensionless; FQki is "kidney fractional tissue blood flow";
  FQh = 0.215 dimensionless; FQh is "hepatic (venous side) fractional tissue blood flow";
  FQlu = 1 dimensionless; FQlu is "lung fractional tissue blood flow";
  FQsp = 0.017 dimensionless; FQsp is "spleen fractional tissue blood flow";
  FQpa = 0.017 dimensionless; FQpa is "pancreas fractional tissue blood flow";
  FQre has dimensionless; FQre is "rest of body fractional tissue blood flow";
  conversion_min_per_day = 1440 min_per_day; conversion_min_per_day is "Conversion factor min to hours";
  DEXCYP3A4_Vmax = 1e-5 mmole_per_min_l;
  DEXCYP3A4_Km_dex = 286 mM;
  Mr_dex = 271.404 g_per_mole; Mr_dex is "Molecular weight dex [g/mole]";
  fup_dex = 1 dimensionless; fup_dex is "fraction unbound in plasma dex";
  BP_dex = 1 dimensionless; BP_dex is "blood to plasma ratio dex";
  IVDOSE_dex = 0 mg; IVDOSE_dex is "IV bolus dose dex [mg]";
  ti_dex = 10 s; ti_dex is "injection time dex [s]";
  Ki_dex has per_min; Ki_dex is "Ki [1/min] injection dex";
  Ri_dex = 0 mg_per_min; Ri_dex is "Ri [mg/min] rate of infusion dex";
  cum_dose_dex = 0 mg; cum_dose_dex is "Cumulative dose due to infusion dex";
  PODOSE_dex = 0 mg; PODOSE_dex is "oral dose dex [mg]";
  GUTDOSE_dex = 0 mg; GUTDOSE_dex is "dose dissolved in gut dex [mg]";
  Ka_dis_dex = 0.1601263 per_hr; Ka_dis_dex is "Ka_dis [1/hr] dissolution dex";
  Ka_abs_dex = 46.98673 per_hr; Ka_abs_dex is "Ka_abs [1/hr] absorption dex";
  F_dex = 0.55 dimensionless; F_dex is "fraction absorbed dex";
  Mr_dor = 257.37066 g_per_mole; Mr_dor is "Molecular weight dor [g/mole]";
  fup_dor = 1 dimensionless; fup_dor is "fraction unbound in plasma dor";
  BP_dor = 1 dimensionless; BP_dor is "blood to plasma ratio dor";
  dex_dor_plasma has dimensionless; dex_dor_plasma is "Current plasma DEX/DOR ratio";
  dex_dor_urine has dimensionless; dex_dor_urine is "Cumulative urinary DEX/DOR ratio";
  Qgu has l_per_min; Qgu is "gut blood flow";
  Qki has l_per_min; Qki is "kidney blood flow";
  Qh has l_per_min; Qh is "hepatic (venous side) blood flow";
  Qha has l_per_min; Qha is "hepatic artery blood flow";
  Qlu has l_per_min; Qlu is "lung blood flow";
  Qsp has l_per_min; Qsp is "spleen blood flow";
  Qpa has l_per_min; Qpa is "pancreas blood flow";
  Qre has l_per_min; Qre is "rest of body blood flow";
  Qpo has l_per_min; Qpo is "portal blood flow";
  Agu_plasma_dex has mmole; Agu_plasma_dex is "dextormethorphan amount (gut) [mmole]";
  Cgu_free_dex has mM; Cgu_free_dex is "dextormethorphan free concentration (gut) [mmole/l]";
  Xgu_plasma_dex has mg; Xgu_plasma_dex is "dextormethorphan amount (gut) [mg]";
  Mgu_plasma_dex has mg_per_l; Mgu_plasma_dex is "dextormethorphan concentration (gut) [mg/l]";
  Aki_plasma_dex has mmole; Aki_plasma_dex is "dextormethorphan amount (kidney) [mmole]";
  Cki_free_dex has mM; Cki_free_dex is "dextormethorphan free concentration (kidney) [mmole/l]";
  Xki_plasma_dex has mg; Xki_plasma_dex is "dextormethorphan amount (kidney) [mg]";
  Mki_plasma_dex has mg_per_l; Mki_plasma_dex is "dextormethorphan concentration (kidney) [mg/l]";
  Ali_plasma_dex has mmole; Ali_plasma_dex is "dextormethorphan amount (liver) [mmole]";
  Cli_free_dex has mM; Cli_free_dex is "dextormethorphan free concentration (liver) [mmole/l]";
  Xli_plasma_dex has mg; Xli_plasma_dex is "dextormethorphan amount (liver) [mg]";
  Mli_plasma_dex has mg_per_l; Mli_plasma_dex is "dextormethorphan concentration (liver) [mg/l]";
  Alu_plasma_dex has mmole; Alu_plasma_dex is "dextormethorphan amount (lung) [mmole]";
  Clu_free_dex has mM; Clu_free_dex is "dextormethorphan free concentration (lung) [mmole/l]";
  Xlu_plasma_dex has mg; Xlu_plasma_dex is "dextormethorphan amount (lung) [mg]";
  Mlu_plasma_dex has mg_per_l; Mlu_plasma_dex is "dextormethorphan concentration (lung) [mg/l]";
  Apa_plasma_dex has mmole; Apa_plasma_dex is "dextormethorphan amount (pancreas) [mmole]";
  Cpa_free_dex has mM; Cpa_free_dex is "dextormethorphan free concentration (pancreas) [mmole/l]";
  Xpa_plasma_dex has mg; Xpa_plasma_dex is "dextormethorphan amount (pancreas) [mg]";
  Mpa_plasma_dex has mg_per_l; Mpa_plasma_dex is "dextormethorphan concentration (pancreas) [mg/l]";
  Asp_plasma_dex has mmole; Asp_plasma_dex is "dextormethorphan amount (spleen) [mmole]";
  Csp_free_dex has mM; Csp_free_dex is "dextormethorphan free concentration (spleen) [mmole/l]";
  Xsp_plasma_dex has mg; Xsp_plasma_dex is "dextormethorphan amount (spleen) [mg]";
  Msp_plasma_dex has mg_per_l; Msp_plasma_dex is "dextormethorphan concentration (spleen) [mg/l]";
  Are_plasma_dex has mmole; Are_plasma_dex is "dextormethorphan amount (rest) [mmole]";
  Cre_free_dex has mM; Cre_free_dex is "dextormethorphan free concentration (rest) [mmole/l]";
  Xre_plasma_dex has mg; Xre_plasma_dex is "dextormethorphan amount (rest) [mg]";
  Mre_plasma_dex has mg_per_l; Mre_plasma_dex is "dextormethorphan concentration (rest) [mg/l]";
  Aar_dex has mmole; Aar_dex is "dextormethorphan amount (arterial blood) [mmole]";
  Xar_dex has mg; Xar_dex is "dextormethorphan amount (arterial blood) [mg]";
  Mar_dex has mg_per_l; Mar_dex is "dextormethorphan concentration (arterial blood) [mg/l]";
  Ave_dex has mmole; Ave_dex is "dextormethorphan amount (venous blood) [mmole]";
  Xve_dex has mg; Xve_dex is "dextormethorphan amount (venous blood) [mg]";
  Mve_dex has mg_per_l; Mve_dex is "dextormethorphan concentration (venous blood) [mg/l]";
  Apo_dex has mmole; Apo_dex is "dextormethorphan amount (portal vein) [mmole]";
  Xpo_dex has mg; Xpo_dex is "dextormethorphan amount (portal vein) [mg]";
  Mpo_dex has mg_per_l; Mpo_dex is "dextormethorphan concentration (portal vein) [mg/l]";
  Ahv_dex has mmole; Ahv_dex is "dextormethorphan amount (hepatic vein) [mmole]";
  Xhv_dex has mg; Xhv_dex is "dextormethorphan amount (hepatic vein) [mg]";
  Mhv_dex has mg_per_l; Mhv_dex is "dextormethorphan concentration (hepatic vein) [mg/l]";
  Xurine_dex has mg; Xurine_dex is "dextormethorphan amount (urine) [mg]";
  Xfeces_dex has mg; Xfeces_dex is "dextormethorphan amount (feces)";
  Agu_plasma_dor has mmole; Agu_plasma_dor is "dextorphan amount (gut) [mmole]";
  Cgu_free_dor has mM; Cgu_free_dor is "dextorphan free concentration (gut) [mmole/l]";
  Xgu_plasma_dor has mg; Xgu_plasma_dor is "dextorphan amount (gut) [mg]";
  Mgu_plasma_dor has mg_per_l; Mgu_plasma_dor is "dextorphan concentration (gut) [mg/l]";
  Aki_plasma_dor has mmole; Aki_plasma_dor is "dextorphan amount (kidney) [mmole]";
  Cki_free_dor has mM; Cki_free_dor is "dextorphan free concentration (kidney) [mmole/l]";
  Xki_plasma_dor has mg; Xki_plasma_dor is "dextorphan amount (kidney) [mg]";
  Mki_plasma_dor has mg_per_l; Mki_plasma_dor is "dextorphan concentration (kidney) [mg/l]";
  Ali_plasma_dor has mmole; Ali_plasma_dor is "dextorphan amount (liver) [mmole]";
  Cli_free_dor has mM; Cli_free_dor is "dextorphan free concentration (liver) [mmole/l]";
  Xli_plasma_dor has mg; Xli_plasma_dor is "dextorphan amount (liver) [mg]";
  Mli_plasma_dor has mg_per_l; Mli_plasma_dor is "dextorphan concentration (liver) [mg/l]";
  Alu_plasma_dor has mmole; Alu_plasma_dor is "dextorphan amount (lung) [mmole]";
  Clu_free_dor has mM; Clu_free_dor is "dextorphan free concentration (lung) [mmole/l]";
  Xlu_plasma_dor has mg; Xlu_plasma_dor is "dextorphan amount (lung) [mg]";
  Mlu_plasma_dor has mg_per_l; Mlu_plasma_dor is "dextorphan concentration (lung) [mg/l]";
  Apa_plasma_dor has mmole; Apa_plasma_dor is "dextorphan amount (pancreas) [mmole]";
  Cpa_free_dor has mM; Cpa_free_dor is "dextorphan free concentration (pancreas) [mmole/l]";
  Xpa_plasma_dor has mg; Xpa_plasma_dor is "dextorphan amount (pancreas) [mg]";
  Mpa_plasma_dor has mg_per_l; Mpa_plasma_dor is "dextorphan concentration (pancreas) [mg/l]";
  Asp_plasma_dor has mmole; Asp_plasma_dor is "dextorphan amount (spleen) [mmole]";
  Csp_free_dor has mM; Csp_free_dor is "dextorphan free concentration (spleen) [mmole/l]";
  Xsp_plasma_dor has mg; Xsp_plasma_dor is "dextorphan amount (spleen) [mg]";
  Msp_plasma_dor has mg_per_l; Msp_plasma_dor is "dextorphan concentration (spleen) [mg/l]";
  Are_plasma_dor has mmole; Are_plasma_dor is "dextorphan amount (rest) [mmole]";
  Cre_free_dor has mM; Cre_free_dor is "dextorphan free concentration (rest) [mmole/l]";
  Xre_plasma_dor has mg; Xre_plasma_dor is "dextorphan amount (rest) [mg]";
  Mre_plasma_dor has mg_per_l; Mre_plasma_dor is "dextorphan concentration (rest) [mg/l]";
  Aar_dor has mmole; Aar_dor is "dextorphan amount (arterial blood) [mmole]";
  Xar_dor has mg; Xar_dor is "dextorphan amount (arterial blood) [mg]";
  Mar_dor has mg_per_l; Mar_dor is "dextorphan concentration (arterial blood) [mg/l]";
  Ave_dor has mmole; Ave_dor is "dextorphan amount (venous blood) [mmole]";
  Xve_dor has mg; Xve_dor is "dextorphan amount (venous blood) [mg]";
  Mve_dor has mg_per_l; Mve_dor is "dextorphan concentration (venous blood) [mg/l]";
  Apo_dor has mmole; Apo_dor is "dextorphan amount (portal vein) [mmole]";
  Xpo_dor has mg; Xpo_dor is "dextorphan amount (portal vein) [mg]";
  Mpo_dor has mg_per_l; Mpo_dor is "dextorphan concentration (portal vein) [mg/l]";
  Ahv_dor has mmole; Ahv_dor is "dextorphan amount (hepatic vein) [mmole]";
  Xhv_dor has mg; Xhv_dor is "dextorphan amount (hepatic vein) [mg]";
  Mhv_dor has mg_per_l; Mhv_dor is "dextorphan concentration (hepatic vein) [mg/l]";
  Xurine_dor has mg; Xurine_dor is "dextorphan amount (urine) [mg]";
  dissolution_dex has mmole_per_min; dissolution_dex is "dissolution dextormethorphan";
  KI__DEXEX_k = 0.017 per_min; KI__DEXEX_k is "DEX urinary excretion rate";
  KI__DOREX_k = 0.14 per_min; KI__DOREX_k is "DOR urinary excretion rate";
  LI__cyp2d6_a0 = 1 dimensionless; LI__cyp2d6_a0 is "*1 activity";
  LI__cyp2d6_a1 = 0.25 dimensionless; LI__cyp2d6_a1 is "*10 activity";
  LI__cyp2d6_a2 = 0 dimensionless; LI__cyp2d6_a2 is "*100 activity";
  LI__cyp2d6_a3 = 0 dimensionless; LI__cyp2d6_a3 is "*101 activity";
  LI__cyp2d6_a4 = 0.5 dimensionless; LI__cyp2d6_a4 is "*10x2 activity";
  LI__cyp2d6_a5 = 0 dimensionless; LI__cyp2d6_a5 is "*11 activity";
  LI__cyp2d6_a6 = 0 dimensionless; LI__cyp2d6_a6 is "*114 activity";
  LI__cyp2d6_a7 = 0 dimensionless; LI__cyp2d6_a7 is "*12 activity";
  LI__cyp2d6_a8 = 0 dimensionless; LI__cyp2d6_a8 is "*120 activity";
  LI__cyp2d6_a9 = 0 dimensionless; LI__cyp2d6_a9 is "*124 activity";
  LI__cyp2d6_a10 = 0 dimensionless; LI__cyp2d6_a10 is "*129 activity";
  LI__cyp2d6_a11 = 0 dimensionless; LI__cyp2d6_a11 is "*13 activity";
  LI__cyp2d6_a12 = 0.5 dimensionless; LI__cyp2d6_a12 is "*14 activity";
  LI__cyp2d6_a13 = 0 dimensionless; LI__cyp2d6_a13 is "*15 activity";
  LI__cyp2d6_a14 = 0.5 dimensionless; LI__cyp2d6_a14 is "*17 activity";
  LI__cyp2d6_a15 = 1 dimensionless; LI__cyp2d6_a15 is "*17x2 activity";
  LI__cyp2d6_a16 = 0 dimensionless; LI__cyp2d6_a16 is "*18 activity";
  LI__cyp2d6_a17 = 0 dimensionless; LI__cyp2d6_a17 is "*19 activity";
  LI__cyp2d6_a18 = 2 dimensionless; LI__cyp2d6_a18 is "*1x2 activity";
  LI__cyp2d6_a19 = 3 dimensionless; LI__cyp2d6_a19 is "*1x3 activity";
  LI__cyp2d6_a20 = 4 dimensionless; LI__cyp2d6_a20 is "*1x4 activity";
  LI__cyp2d6_a21 = 5 dimensionless; LI__cyp2d6_a21 is "*1x5 activity";
  LI__cyp2d6_a22 = 6 dimensionless; LI__cyp2d6_a22 is "*1x6 activity";
  LI__cyp2d6_a23 = 1 dimensionless; LI__cyp2d6_a23 is "*2 activity";
  LI__cyp2d6_a24 = 0 dimensionless; LI__cyp2d6_a24 is "*20 activity";
  LI__cyp2d6_a25 = 0 dimensionless; LI__cyp2d6_a25 is "*21 activity";
  LI__cyp2d6_a26 = 1 dimensionless; LI__cyp2d6_a26 is "*27 activity";
  LI__cyp2d6_a27 = 0.5 dimensionless; LI__cyp2d6_a27 is "*29 activity";
  LI__cyp2d6_a28 = 1 dimensionless; LI__cyp2d6_a28 is "*29x2 activity";
  LI__cyp2d6_a29 = 2 dimensionless; LI__cyp2d6_a29 is "*2x2 activity";
  LI__cyp2d6_a30 = 3 dimensionless; LI__cyp2d6_a30 is "*2x3 activity";
  LI__cyp2d6_a31 = 4 dimensionless; LI__cyp2d6_a31 is "*2x4 activity";
  LI__cyp2d6_a32 = 5 dimensionless; LI__cyp2d6_a32 is "*2x5 activity";
  LI__cyp2d6_a33 = 6 dimensionless; LI__cyp2d6_a33 is "*2x6 activity";
  LI__cyp2d6_a34 = 0 dimensionless; LI__cyp2d6_a34 is "*3 activity";
  LI__cyp2d6_a35 = 0 dimensionless; LI__cyp2d6_a35 is "*31 activity";
  LI__cyp2d6_a36 = 1 dimensionless; LI__cyp2d6_a36 is "*33 activity";
  LI__cyp2d6_a37 = 1 dimensionless; LI__cyp2d6_a37 is "*34 activity";
  LI__cyp2d6_a38 = 1 dimensionless; LI__cyp2d6_a38 is "*35 activity";
  LI__cyp2d6_a39 = 2 dimensionless; LI__cyp2d6_a39 is "*35x2 activity";
  LI__cyp2d6_a40 = 0 dimensionless; LI__cyp2d6_a40 is "*36 activity";
  LI__cyp2d6_a41 = 0 dimensionless; LI__cyp2d6_a41 is "*36x2 activity";
  LI__cyp2d6_a42 = 0 dimensionless; LI__cyp2d6_a42 is "*38 activity";
  LI__cyp2d6_a43 = 1 dimensionless; LI__cyp2d6_a43 is "*39 activity";
  LI__cyp2d6_a44 = 0 dimensionless; LI__cyp2d6_a44 is "*3x2 activity";
  LI__cyp2d6_a45 = 0 dimensionless; LI__cyp2d6_a45 is "*4 activity";
  LI__cyp2d6_a46 = 0 dimensionless; LI__cyp2d6_a46 is "*40 activity";
  LI__cyp2d6_a47 = 0.5 dimensionless; LI__cyp2d6_a47 is "*41 activity";
  LI__cyp2d6_a48 = 1 dimensionless; LI__cyp2d6_a48 is "*41x2 activity";
  LI__cyp2d6_a49 = 1.5 dimensionless; LI__cyp2d6_a49 is "*41x3 activity";
  LI__cyp2d6_a50 = 0 dimensionless; LI__cyp2d6_a50 is "*42 activity";
  LI__cyp2d6_a51 = 0 dimensionless; LI__cyp2d6_a51 is "*44 activity";
  LI__cyp2d6_a52 = 1 dimensionless; LI__cyp2d6_a52 is "*45 activity";
  LI__cyp2d6_a53 = 2 dimensionless; LI__cyp2d6_a53 is "*45x2 activity";
  LI__cyp2d6_a54 = 1 dimensionless; LI__cyp2d6_a54 is "*46 activity";
  LI__cyp2d6_a55 = 0 dimensionless; LI__cyp2d6_a55 is "*47 activity";
  LI__cyp2d6_a56 = 1 dimensionless; LI__cyp2d6_a56 is "*48 activity";
  LI__cyp2d6_a57 = 0.5 dimensionless; LI__cyp2d6_a57 is "*49 activity";
  LI__cyp2d6_a58 = 0 dimensionless; LI__cyp2d6_a58 is "*4x2 activity";
  LI__cyp2d6_a59 = 0 dimensionless; LI__cyp2d6_a59 is "*4x3 activity";
  LI__cyp2d6_a60 = 0 dimensionless; LI__cyp2d6_a60 is "*4x4 activity";
  LI__cyp2d6_a61 = 0 dimensionless; LI__cyp2d6_a61 is "*4x5 activity";
  LI__cyp2d6_a62 = 0 dimensionless; LI__cyp2d6_a62 is "*5 activity";
  LI__cyp2d6_a63 = 0.5 dimensionless; LI__cyp2d6_a63 is "*50 activity";
  LI__cyp2d6_a64 = 0 dimensionless; LI__cyp2d6_a64 is "*51 activity";
  LI__cyp2d6_a65 = 1 dimensionless; LI__cyp2d6_a65 is "*53 activity";
  LI__cyp2d6_a66 = 0.5 dimensionless; LI__cyp2d6_a66 is "*54 activity";
  LI__cyp2d6_a67 = 0.5 dimensionless; LI__cyp2d6_a67 is "*55 activity";
  LI__cyp2d6_a68 = 0 dimensionless; LI__cyp2d6_a68 is "*56 activity";
  LI__cyp2d6_a69 = 0 dimensionless; LI__cyp2d6_a69 is "*57 activity";
  LI__cyp2d6_a70 = 0.5 dimensionless; LI__cyp2d6_a70 is "*59 activity";
  LI__cyp2d6_a71 = 0 dimensionless; LI__cyp2d6_a71 is "*6 activity";
  LI__cyp2d6_a72 = 0 dimensionless; LI__cyp2d6_a72 is "*60 activity";
  LI__cyp2d6_a73 = 0 dimensionless; LI__cyp2d6_a73 is "*62 activity";
  LI__cyp2d6_a74 = 0 dimensionless; LI__cyp2d6_a74 is "*68 activity";
  LI__cyp2d6_a75 = 0 dimensionless; LI__cyp2d6_a75 is "*69 activity";
  LI__cyp2d6_a76 = 0 dimensionless; LI__cyp2d6_a76 is "*6x2 activity";
  LI__cyp2d6_a77 = 0 dimensionless; LI__cyp2d6_a77 is "*7 activity";
  LI__cyp2d6_a78 = 0 dimensionless; LI__cyp2d6_a78 is "*8 activity";
  LI__cyp2d6_a79 = 0 dimensionless; LI__cyp2d6_a79 is "*81 activity";
  LI__cyp2d6_a80 = 0.5 dimensionless; LI__cyp2d6_a80 is "*9 activity";
  LI__cyp2d6_a81 = 0 dimensionless; LI__cyp2d6_a81 is "*92 activity";
  LI__cyp2d6_a82 = 0 dimensionless; LI__cyp2d6_a82 is "*96 activity";
  LI__cyp2d6_a83 = 0 dimensionless; LI__cyp2d6_a83 is "*99 activity";
  LI__cyp2d6_a84 = 1 dimensionless; LI__cyp2d6_a84 is "*9x2 activity";
  LI__cyp2d6_ac = 1 dimensionless; LI__cyp2d6_ac is "custom allele activity";
  LI__cyp2d6_allele1 = 0 dimensionless; LI__cyp2d6_allele1 is "allele 1";
  LI__cyp2d6_allele2 = 0 dimensionless; LI__cyp2d6_allele2 is "allele 2";
  LI__cyp2d6_activity1 has dimensionless; LI__cyp2d6_activity1 is "activity of allele 1";
  LI__cyp2d6_activity2 has dimensionless; LI__cyp2d6_activity2 is "Activity of allele 2";
  LI__DEXCYP3A4_Km_dex_dor = 0.157 mM; LI__DEXCYP3A4_Km_dex_dor is "DEX CYP3A4 Km of minor pathway for DOR formation.";
  LI__DEXCYP3A4_Vmax_dor = 1 mmole_per_min_l; LI__DEXCYP3A4_Vmax_dor is "DEX CYP3A4 Vmax minor pathway for DOR formation.";
  LI__cyp2d6_activity has dimensionless;
  LI__DEXCYP2D6_Vmax = 1 mmole_per_min_l; LI__DEXCYP2D6_Vmax is "DEX CYP2D6 Vmax";
  LI__DEXCYP2D6_Km_dex = 0.00389 mM; LI__DEXCYP2D6_Km_dex is "DEX CYP2D6 Km";
  LI__DEXCYP2D6_Ki_qui = 0.0001 mM; LI__DEXCYP2D6_Ki_qui is "DEX CYP2D6 Ki quinidine";
  LI__DEXCYP3A4_activity = 1 dimensionless;
  LI__DEXIM_f = 100 dimensionless; LI__DEXIM_f is "scaling factor of DEX import";
  LI__DEXIM_Km_dex = 0.1 mM;
  LI__DOREX_f = 100 dimensionless; LI__DOREX_f is "scaling factor of DOR export";
  LI__DOREX_Km_dor = 0.1 mM;
  GU__DEXEX_f = 390 dimensionless; GU__DEXEX_f is "scaling factor DEX export relative to metabolic reactions";
  GU__DEXEX_Km_dex = 0.1 mM; GU__DEXEX_Km_dex is "DEX export Km";
  GU__DEXCYP3A4_activity = 1 dimensionless;

  // Assignment rules:
  dex_dor_plasma := Cve_dex/Cve_dor;
  dex_dor_urine := Aurine_dex/Aurine_dor;
  FVre := 1 l_per_kg - (FVgu + FVki + FVli + FVlu + FVsp + FVpa + FVve + FVar);
  FQre := 1 - (FQki + FQh);
  BSA := 0.024265 m2*(BW/(1 kg))^0.5378*(HEIGHT/(1 cm))^0.3964;
  CO := BW*COBW + (HR - HRrest)*COHRI/(60 s_per_min);
  QC := CO/(1000 ml_per_l)*60 s_per_min;
  Vgu := BW*FVgu;
  Vki := BW*FVki;
  Vli := BW*FVli;
  Vlu := BW*FVlu;
  Vsp := BW*FVsp;
  Vpa := BW*FVpa;
  Vre := BW*FVre;
  Vve := BW*FVve - FVve/(FVar + FVve)*BW*Fblood*(1 l_per_kg - FVve - FVar);
  Var := BW*FVar - FVar/(FVar + FVve)*BW*Fblood*(1 l_per_kg - FVve - FVar);
  Vpo := (1 - HCT)*(BW*FVpo - FVpo/(FVar + FVve + FVpo + FVhv)*BW*Fblood*(1 l_per_kg - (FVar + FVve + FVpo + FVhv)));
  Vhv := (1 - HCT)*(BW*FVhv - FVhv/(FVar + FVve + FVpo + FVhv)*BW*Fblood*(1 l_per_kg - (FVar + FVve + FVpo + FVhv)));
  Qgu := QC*FQgu;
  Qki := QC*FQki;
  Qh := QC*FQh;
  Qha := Qh - Qgu - Qsp - Qpa;
  Qlu := QC*FQlu;
  Qsp := QC*FQsp;
  Qpa := QC*FQpa;
  Qre := QC*FQre;
  Qpo := Qsp + Qpa + Qgu;
  Vgu_tissue := Vgu*(1 - Fblood);
  Vgu_plasma := Vgu*Fblood*(1 - HCT);
  Vki_tissue := Vki*(1 - Fblood);
  Vki_plasma := Vki*Fblood*(1 - HCT);
  Vli_tissue := Vli*(1 - Fblood);
  Vli_plasma := Vli*Fblood*(1 - HCT);
  Vlu_tissue := Vlu*(1 - Fblood);
  Vlu_plasma := Vlu*Fblood*(1 - HCT);
  Vpa_tissue := Vpa*(1 - Fblood);
  Vpa_plasma := Vpa*Fblood*(1 - HCT);
  Vsp_tissue := Vsp*(1 - Fblood);
  Vsp_plasma := Vsp*Fblood*(1 - HCT);
  Vre_tissue := Vre*(1 - Fblood);
  Vre_plasma := Vre*Fblood*(1 - HCT);
  Ki_dex := 0.693/ti_dex*60 s_per_min;
  Agu_plasma_dex := Cgu_plasma_dex*Vgu_plasma;
  Cgu_free_dex := Cgu_plasma_dex*fup_dex;
  Xgu_plasma_dex := Agu_plasma_dex*Mr_dex;
  Mgu_plasma_dex := Agu_plasma_dex/Vgu_plasma*Mr_dex;
  Aki_plasma_dex := Cki_plasma_dex*Vki_plasma;
  Cki_free_dex := Cki_plasma_dex*fup_dex;
  Xki_plasma_dex := Aki_plasma_dex*Mr_dex;
  Mki_plasma_dex := Aki_plasma_dex/Vki_plasma*Mr_dex;
  Ali_plasma_dex := Cli_plasma_dex*Vli_plasma;
  Cli_free_dex := Cli_plasma_dex*fup_dex;
  Xli_plasma_dex := Ali_plasma_dex*Mr_dex;
  Mli_plasma_dex := Ali_plasma_dex/Vli_plasma*Mr_dex;
  Alu_plasma_dex := Clu_plasma_dex*Vlu_plasma;
  Clu_free_dex := Clu_plasma_dex*fup_dex;
  Xlu_plasma_dex := Alu_plasma_dex*Mr_dex;
  Mlu_plasma_dex := Alu_plasma_dex/Vlu_plasma*Mr_dex;
  Apa_plasma_dex := Cpa_plasma_dex*Vpa_plasma;
  Cpa_free_dex := Cpa_plasma_dex*fup_dex;
  Xpa_plasma_dex := Apa_plasma_dex*Mr_dex;
  Mpa_plasma_dex := Apa_plasma_dex/Vpa_plasma*Mr_dex;
  Asp_plasma_dex := Csp_plasma_dex*Vsp_plasma;
  Csp_free_dex := Csp_plasma_dex*fup_dex;
  Xsp_plasma_dex := Asp_plasma_dex*Mr_dex;
  Msp_plasma_dex := Asp_plasma_dex/Vsp_plasma*Mr_dex;
  Are_plasma_dex := Cre_plasma_dex*Vre_plasma;
  Cre_free_dex := Cre_plasma_dex*fup_dex;
  Xre_plasma_dex := Are_plasma_dex*Mr_dex;
  Mre_plasma_dex := Are_plasma_dex/Vre_plasma*Mr_dex;
  Aar_dex := Car_dex*Var;
  Xar_dex := Aar_dex*Mr_dex;
  Mar_dex := Aar_dex/Var*Mr_dex;
  Ave_dex := Cve_dex*Vve;
  Xve_dex := Ave_dex*Mr_dex;
  Mve_dex := Ave_dex/Vve*Mr_dex;
  Apo_dex := Cpo_dex*Vpo;
  Xpo_dex := Apo_dex*Mr_dex;
  Mpo_dex := Apo_dex/Vpo*Mr_dex;
  Ahv_dex := Chv_dex*Vhv;
  Xhv_dex := Ahv_dex*Mr_dex;
  Mhv_dex := Ahv_dex/Vhv*Mr_dex;
  Xurine_dex := Aurine_dex*Mr_dex;
  Xfeces_dex := Afeces_dex*Mr_dex;
  Agu_plasma_dor := Cgu_plasma_dor*Vgu_plasma;
  Cgu_free_dor := Cgu_plasma_dor*fup_dor;
  Xgu_plasma_dor := Agu_plasma_dor*Mr_dor;
  Mgu_plasma_dor := Agu_plasma_dor/Vgu_plasma*Mr_dor;
  Aki_plasma_dor := Cki_plasma_dor*Vki_plasma;
  Cki_free_dor := Cki_plasma_dor*fup_dor;
  Xki_plasma_dor := Aki_plasma_dor*Mr_dor;
  Mki_plasma_dor := Aki_plasma_dor/Vki_plasma*Mr_dor;
  Ali_plasma_dor := Cli_plasma_dor*Vli_plasma;
  Cli_free_dor := Cli_plasma_dor*fup_dor;
  Xli_plasma_dor := Ali_plasma_dor*Mr_dor;
  Mli_plasma_dor := Ali_plasma_dor/Vli_plasma*Mr_dor;
  Alu_plasma_dor := Clu_plasma_dor*Vlu_plasma;
  Clu_free_dor := Clu_plasma_dor*fup_dor;
  Xlu_plasma_dor := Alu_plasma_dor*Mr_dor;
  Mlu_plasma_dor := Alu_plasma_dor/Vlu_plasma*Mr_dor;
  Apa_plasma_dor := Cpa_plasma_dor*Vpa_plasma;
  Cpa_free_dor := Cpa_plasma_dor*fup_dor;
  Xpa_plasma_dor := Apa_plasma_dor*Mr_dor;
  Mpa_plasma_dor := Apa_plasma_dor/Vpa_plasma*Mr_dor;
  Asp_plasma_dor := Csp_plasma_dor*Vsp_plasma;
  Csp_free_dor := Csp_plasma_dor*fup_dor;
  Xsp_plasma_dor := Asp_plasma_dor*Mr_dor;
  Msp_plasma_dor := Asp_plasma_dor/Vsp_plasma*Mr_dor;
  Are_plasma_dor := Cre_plasma_dor*Vre_plasma;
  Cre_free_dor := Cre_plasma_dor*fup_dor;
  Xre_plasma_dor := Are_plasma_dor*Mr_dor;
  Mre_plasma_dor := Are_plasma_dor/Vre_plasma*Mr_dor;
  Aar_dor := Car_dor*Var;
  Xar_dor := Aar_dor*Mr_dor;
  Mar_dor := Aar_dor/Var*Mr_dor;
  Ave_dor := Cve_dor*Vve;
  Xve_dor := Ave_dor*Mr_dor;
  Mve_dor := Ave_dor/Vve*Mr_dor;
  Apo_dor := Cpo_dor*Vpo;
  Xpo_dor := Apo_dor*Mr_dor;
  Mpo_dor := Apo_dor/Vpo*Mr_dor;
  Ahv_dor := Chv_dor*Vhv;
  Xhv_dor := Ahv_dor*Mr_dor;
  Mhv_dor := Ahv_dor/Vhv*Mr_dor;
  Xurine_dor := Aurine_dor*Mr_dor;
  dissolution_dex := Ka_dis_dex/(60 min_per_hr)*PODOSE_dex/Mr_dex;
  LI__cyp2d6_activity1 := piecewise(LI__cyp2d6_ac, LI__cyp2d6_allele1 == -1, LI__cyp2d6_a0, LI__cyp2d6_allele1 == 0, LI__cyp2d6_a1, LI__cyp2d6_allele1 == 1, LI__cyp2d6_a2, LI__cyp2d6_allele1 == 2, LI__cyp2d6_a3, LI__cyp2d6_allele1 == 3, LI__cyp2d6_a4, LI__cyp2d6_allele1 == 4, LI__cyp2d6_a5, LI__cyp2d6_allele1 == 5, LI__cyp2d6_a6, LI__cyp2d6_allele1 == 6, LI__cyp2d6_a7, LI__cyp2d6_allele1 == 7, LI__cyp2d6_a8, LI__cyp2d6_allele1 == 8, LI__cyp2d6_a9, LI__cyp2d6_allele1 == 9, LI__cyp2d6_a10, LI__cyp2d6_allele1 == 10, LI__cyp2d6_a11, LI__cyp2d6_allele1 == 11, LI__cyp2d6_a12, LI__cyp2d6_allele1 == 12, LI__cyp2d6_a13, LI__cyp2d6_allele1 == 13, LI__cyp2d6_a14, LI__cyp2d6_allele1 == 14, LI__cyp2d6_a15, LI__cyp2d6_allele1 == 15, LI__cyp2d6_a16, LI__cyp2d6_allele1 == 16, LI__cyp2d6_a17, LI__cyp2d6_allele1 == 17, LI__cyp2d6_a18, LI__cyp2d6_allele1 == 18, LI__cyp2d6_a19, LI__cyp2d6_allele1 == 19, LI__cyp2d6_a20, LI__cyp2d6_allele1 == 20, LI__cyp2d6_a21, LI__cyp2d6_allele1 == 21, LI__cyp2d6_a22, LI__cyp2d6_allele1 == 22, LI__cyp2d6_a23, LI__cyp2d6_allele1 == 23, LI__cyp2d6_a24, LI__cyp2d6_allele1 == 24, LI__cyp2d6_a25, LI__cyp2d6_allele1 == 25, LI__cyp2d6_a26, LI__cyp2d6_allele1 == 26, LI__cyp2d6_a27, LI__cyp2d6_allele1 == 27, LI__cyp2d6_a28, LI__cyp2d6_allele1 == 28, LI__cyp2d6_a29, LI__cyp2d6_allele1 == 29, LI__cyp2d6_a30, LI__cyp2d6_allele1 == 30, LI__cyp2d6_a31, LI__cyp2d6_allele1 == 31, LI__cyp2d6_a32, LI__cyp2d6_allele1 == 32, LI__cyp2d6_a33, LI__cyp2d6_allele1 == 33, LI__cyp2d6_a34, LI__cyp2d6_allele1 == 34, LI__cyp2d6_a35, LI__cyp2d6_allele1 == 35, LI__cyp2d6_a36, LI__cyp2d6_allele1 == 36, LI__cyp2d6_a37, LI__cyp2d6_allele1 == 37, LI__cyp2d6_a38, LI__cyp2d6_allele1 == 38, LI__cyp2d6_a39, LI__cyp2d6_allele1 == 39, LI__cyp2d6_a40, LI__cyp2d6_allele1 == 40, LI__cyp2d6_a41, LI__cyp2d6_allele1 == 41, LI__cyp2d6_a42, LI__cyp2d6_allele1 == 42, LI__cyp2d6_a43, LI__cyp2d6_allele1 == 43, LI__cyp2d6_a44, LI__cyp2d6_allele1 == 44, LI__cyp2d6_a45, LI__cyp2d6_allele1 == 45, LI__cyp2d6_a46, LI__cyp2d6_allele1 == 46, LI__cyp2d6_a47, LI__cyp2d6_allele1 == 47, LI__cyp2d6_a48, LI__cyp2d6_allele1 == 48, LI__cyp2d6_a49, LI__cyp2d6_allele1 == 49, LI__cyp2d6_a50, LI__cyp2d6_allele1 == 50, LI__cyp2d6_a51, LI__cyp2d6_allele1 == 51, LI__cyp2d6_a52, LI__cyp2d6_allele1 == 52, LI__cyp2d6_a53, LI__cyp2d6_allele1 == 53, LI__cyp2d6_a54, LI__cyp2d6_allele1 == 54, LI__cyp2d6_a55, LI__cyp2d6_allele1 == 55, LI__cyp2d6_a56, LI__cyp2d6_allele1 == 56, LI__cyp2d6_a57, LI__cyp2d6_allele1 == 57, LI__cyp2d6_a58, LI__cyp2d6_allele1 == 58, LI__cyp2d6_a59, LI__cyp2d6_allele1 == 59, LI__cyp2d6_a60, LI__cyp2d6_allele1 == 60, LI__cyp2d6_a61, LI__cyp2d6_allele1 == 61, LI__cyp2d6_a62, LI__cyp2d6_allele1 == 62, LI__cyp2d6_a63, LI__cyp2d6_allele1 == 63, LI__cyp2d6_a64, LI__cyp2d6_allele1 == 64, LI__cyp2d6_a65, LI__cyp2d6_allele1 == 65, LI__cyp2d6_a66, LI__cyp2d6_allele1 == 66, LI__cyp2d6_a67, LI__cyp2d6_allele1 == 67, LI__cyp2d6_a68, LI__cyp2d6_allele1 == 68, LI__cyp2d6_a69, LI__cyp2d6_allele1 == 69, LI__cyp2d6_a70, LI__cyp2d6_allele1 == 70, LI__cyp2d6_a71, LI__cyp2d6_allele1 == 71, LI__cyp2d6_a72, LI__cyp2d6_allele1 == 72, LI__cyp2d6_a73, LI__cyp2d6_allele1 == 73, LI__cyp2d6_a74, LI__cyp2d6_allele1 == 74, LI__cyp2d6_a75, LI__cyp2d6_allele1 == 75, LI__cyp2d6_a76, LI__cyp2d6_allele1 == 76, LI__cyp2d6_a77, LI__cyp2d6_allele1 == 77, LI__cyp2d6_a78, LI__cyp2d6_allele1 == 78, LI__cyp2d6_a79, LI__cyp2d6_allele1 == 79, LI__cyp2d6_a80, LI__cyp2d6_allele1 == 80, LI__cyp2d6_a81, LI__cyp2d6_allele1 == 81, LI__cyp2d6_a82, LI__cyp2d6_allele1 == 82, LI__cyp2d6_a83, LI__cyp2d6_allele1 == 83, LI__cyp2d6_a84, LI__cyp2d6_allele1 == 84, LI__cyp2d6_ac);
  LI__cyp2d6_activity2 := piecewise(LI__cyp2d6_ac, LI__cyp2d6_allele2 == -1, LI__cyp2d6_a0, LI__cyp2d6_allele2 == 0, LI__cyp2d6_a1, LI__cyp2d6_allele2 == 1, LI__cyp2d6_a2, LI__cyp2d6_allele2 == 2, LI__cyp2d6_a3, LI__cyp2d6_allele2 == 3, LI__cyp2d6_a4, LI__cyp2d6_allele2 == 4, LI__cyp2d6_a5, LI__cyp2d6_allele2 == 5, LI__cyp2d6_a6, LI__cyp2d6_allele2 == 6, LI__cyp2d6_a7, LI__cyp2d6_allele2 == 7, LI__cyp2d6_a8, LI__cyp2d6_allele2 == 8, LI__cyp2d6_a9, LI__cyp2d6_allele2 == 9, LI__cyp2d6_a10, LI__cyp2d6_allele2 == 10, LI__cyp2d6_a11, LI__cyp2d6_allele2 == 11, LI__cyp2d6_a12, LI__cyp2d6_allele2 == 12, LI__cyp2d6_a13, LI__cyp2d6_allele2 == 13, LI__cyp2d6_a14, LI__cyp2d6_allele2 == 14, LI__cyp2d6_a15, LI__cyp2d6_allele2 == 15, LI__cyp2d6_a16, LI__cyp2d6_allele2 == 16, LI__cyp2d6_a17, LI__cyp2d6_allele2 == 17, LI__cyp2d6_a18, LI__cyp2d6_allele2 == 18, LI__cyp2d6_a19, LI__cyp2d6_allele2 == 19, LI__cyp2d6_a20, LI__cyp2d6_allele2 == 20, LI__cyp2d6_a21, LI__cyp2d6_allele2 == 21, LI__cyp2d6_a22, LI__cyp2d6_allele2 == 22, LI__cyp2d6_a23, LI__cyp2d6_allele2 == 23, LI__cyp2d6_a24, LI__cyp2d6_allele2 == 24, LI__cyp2d6_a25, LI__cyp2d6_allele2 == 25, LI__cyp2d6_a26, LI__cyp2d6_allele2 == 26, LI__cyp2d6_a27, LI__cyp2d6_allele2 == 27, LI__cyp2d6_a28, LI__cyp2d6_allele2 == 28, LI__cyp2d6_a29, LI__cyp2d6_allele2 == 29, LI__cyp2d6_a30, LI__cyp2d6_allele2 == 30, LI__cyp2d6_a31, LI__cyp2d6_allele2 == 31, LI__cyp2d6_a32, LI__cyp2d6_allele2 == 32, LI__cyp2d6_a33, LI__cyp2d6_allele2 == 33, LI__cyp2d6_a34, LI__cyp2d6_allele2 == 34, LI__cyp2d6_a35, LI__cyp2d6_allele2 == 35, LI__cyp2d6_a36, LI__cyp2d6_allele2 == 36, LI__cyp2d6_a37, LI__cyp2d6_allele2 == 37, LI__cyp2d6_a38, LI__cyp2d6_allele2 == 38, LI__cyp2d6_a39, LI__cyp2d6_allele2 == 39, LI__cyp2d6_a40, LI__cyp2d6_allele2 == 40, LI__cyp2d6_a41, LI__cyp2d6_allele2 == 41, LI__cyp2d6_a42, LI__cyp2d6_allele2 == 42, LI__cyp2d6_a43, LI__cyp2d6_allele2 == 43, LI__cyp2d6_a44, LI__cyp2d6_allele2 == 44, LI__cyp2d6_a45, LI__cyp2d6_allele2 == 45, LI__cyp2d6_a46, LI__cyp2d6_allele2 == 46, LI__cyp2d6_a47, LI__cyp2d6_allele2 == 47, LI__cyp2d6_a48, LI__cyp2d6_allele2 == 48, LI__cyp2d6_a49, LI__cyp2d6_allele2 == 49, LI__cyp2d6_a50, LI__cyp2d6_allele2 == 50, LI__cyp2d6_a51, LI__cyp2d6_allele2 == 51, LI__cyp2d6_a52, LI__cyp2d6_allele2 == 52, LI__cyp2d6_a53, LI__cyp2d6_allele2 == 53, LI__cyp2d6_a54, LI__cyp2d6_allele2 == 54, LI__cyp2d6_a55, LI__cyp2d6_allele2 == 55, LI__cyp2d6_a56, LI__cyp2d6_allele2 == 56, LI__cyp2d6_a57, LI__cyp2d6_allele2 == 57, LI__cyp2d6_a58, LI__cyp2d6_allele2 == 58, LI__cyp2d6_a59, LI__cyp2d6_allele2 == 59, LI__cyp2d6_a60, LI__cyp2d6_allele2 == 60, LI__cyp2d6_a61, LI__cyp2d6_allele2 == 61, LI__cyp2d6_a62, LI__cyp2d6_allele2 == 62, LI__cyp2d6_a63, LI__cyp2d6_allele2 == 63, LI__cyp2d6_a64, LI__cyp2d6_allele2 == 64, LI__cyp2d6_a65, LI__cyp2d6_allele2 == 65, LI__cyp2d6_a66, LI__cyp2d6_allele2 == 66, LI__cyp2d6_a67, LI__cyp2d6_allele2 == 67, LI__cyp2d6_a68, LI__cyp2d6_allele2 == 68, LI__cyp2d6_a69, LI__cyp2d6_allele2 == 69, LI__cyp2d6_a70, LI__cyp2d6_allele2 == 70, LI__cyp2d6_a71, LI__cyp2d6_allele2 == 71, LI__cyp2d6_a72, LI__cyp2d6_allele2 == 72, LI__cyp2d6_a73, LI__cyp2d6_allele2 == 73, LI__cyp2d6_a74, LI__cyp2d6_allele2 == 74, LI__cyp2d6_a75, LI__cyp2d6_allele2 == 75, LI__cyp2d6_a76, LI__cyp2d6_allele2 == 76, LI__cyp2d6_a77, LI__cyp2d6_allele2 == 77, LI__cyp2d6_a78, LI__cyp2d6_allele2 == 78, LI__cyp2d6_a79, LI__cyp2d6_allele2 == 79, LI__cyp2d6_a80, LI__cyp2d6_allele2 == 80, LI__cyp2d6_a81, LI__cyp2d6_allele2 == 81, LI__cyp2d6_a82, LI__cyp2d6_allele2 == 82, LI__cyp2d6_a83, LI__cyp2d6_allele2 == 83, LI__cyp2d6_a84, LI__cyp2d6_allele2 == 84, LI__cyp2d6_ac);
  LI__cyp2d6_activity := LI__cyp2d6_activity1 + LI__cyp2d6_activity2;

  // Rate rules:
  PODOSE_dex' = -dissolution_dex*Mr_dex;
  GUTDOSE_dex' = F_dex*dissolution_dex*Mr_dex - absorption_dex*Mr_dex;
  IVDOSE_dex' = -iv_dex*Mr_dex + Ri_dex;
  cum_dose_dex' = Ri_dex;

  // Reactions:
  iv_dex: => Cve_dex; Ki_dex*IVDOSE_dex/Mr_dex; iv_dex is "iv dextormethorphan";
  absorption_dex: => Cgu_tissue_dex; Ka_abs_dex/(60 min_per_hr)*GUTDOSE_dex/Mr_dex; absorption_dex is "absorption dextormethorphan";
  excretion_dex: => Afeces_dex; (1 - F_dex)*dissolution_dex; excretion_dex is "excretion dextormethorphan";
  Flow_ar_gu_dex: Car_dex => Cgu_plasma_dex; Qgu*Car_dex; Flow_ar_gu_dex is "inflow gut dextormethorphan";
  Flow_gu_po_dex: Cgu_plasma_dex => Cpo_dex; Qgu*Cgu_plasma_dex*BP_dex; Flow_gu_po_dex is "outflow gut dextormethorphan";
  Flow_ar_ki_dex: Car_dex => Cki_plasma_dex; Qki*Car_dex; Flow_ar_ki_dex is "inflow kidney dextormethorphan";
  Flow_ki_ve_dex: Cki_plasma_dex => Cve_dex; Qki*Cki_plasma_dex*BP_dex; Flow_ki_ve_dex is "outflow kidney dextormethorphan";
  Flow_ar_li_dex: Car_dex => Cli_plasma_dex; Qha*Car_dex; Flow_ar_li_dex is "inflow liver dextormethorphan";
  Flow_po_li_dex: Cpo_dex => Cli_plasma_dex; Qpo*Cpo_dex*BP_dex; Flow_po_li_dex is "outflow po dextormethorphan";
  Flow_li_hv_dex: Cli_plasma_dex => Chv_dex; Qh*Cli_plasma_dex*BP_dex; Flow_li_hv_dex is "outflow liver dextormethorphan";
  Flow_hv_ve_dex: Chv_dex => Cve_dex; Qh*Chv_dex*BP_dex; Flow_hv_ve_dex is "outflow hepatic vein dextormethorphan";
  Flow_ve_lu_dex: Cve_dex => Clu_plasma_dex; Qlu*Cve_dex; Flow_ve_lu_dex is "inflow lung dextormethorphan";
  Flow_lu_ar_dex: Clu_plasma_dex => Car_dex; Qlu*Clu_plasma_dex*BP_dex; Flow_lu_ar_dex is "outflow lung dextormethorphan";
  Flow_ar_pa_dex: Car_dex => Cpa_plasma_dex; Qpa*Car_dex; Flow_ar_pa_dex is "inflow pancreas dextormethorphan";
  Flow_pa_po_dex: Cpa_plasma_dex => Cpo_dex; Qpa*Cpa_plasma_dex*BP_dex; Flow_pa_po_dex is "outflow pancreas dextormethorphan";
  Flow_ar_sp_dex: Car_dex => Csp_plasma_dex; Qsp*Car_dex; Flow_ar_sp_dex is "inflow spleen dextormethorphan";
  Flow_sp_po_dex: Csp_plasma_dex => Cpo_dex; Qsp*Csp_plasma_dex*BP_dex; Flow_sp_po_dex is "outflow spleen dextormethorphan";
  Flow_ar_re_dex: Car_dex => Cre_plasma_dex; Qre*Car_dex; Flow_ar_re_dex is "inflow rest dextormethorphan";
  Flow_re_ve_dex: Cre_plasma_dex => Cve_dex; Qre*Cre_plasma_dex*BP_dex; Flow_re_ve_dex is "outflow rest dextormethorphan";
  Flow_ar_gu_dor: Car_dor => Cgu_plasma_dor; Qgu*Car_dor; Flow_ar_gu_dor is "inflow gut dextorphan";
  Flow_gu_po_dor: Cgu_plasma_dor => Cpo_dor; Qgu*Cgu_plasma_dor*BP_dor; Flow_gu_po_dor is "outflow gut dextorphan";
  Flow_ar_ki_dor: Car_dor => Cki_plasma_dor; Qki*Car_dor; Flow_ar_ki_dor is "inflow kidney dextorphan";
  Flow_ki_ve_dor: Cki_plasma_dor => Cve_dor; Qki*Cki_plasma_dor*BP_dor; Flow_ki_ve_dor is "outflow kidney dextorphan";
  Flow_ar_li_dor: Car_dor => Cli_plasma_dor; Qha*Car_dor; Flow_ar_li_dor is "inflow liver dextorphan";
  Flow_po_li_dor: Cpo_dor => Cli_plasma_dor; Qpo*Cpo_dor*BP_dor; Flow_po_li_dor is "outflow po dextorphan";
  Flow_li_hv_dor: Cli_plasma_dor => Chv_dor; Qh*Cli_plasma_dor*BP_dor; Flow_li_hv_dor is "outflow liver dextorphan";
  Flow_hv_ve_dor: Chv_dor => Cve_dor; Qh*Chv_dor*BP_dor; Flow_hv_ve_dor is "outflow hepatic vein dextorphan";
  Flow_ve_lu_dor: Cve_dor => Clu_plasma_dor; Qlu*Cve_dor; Flow_ve_lu_dor is "inflow lung dextorphan";
  Flow_lu_ar_dor: Clu_plasma_dor => Car_dor; Qlu*Clu_plasma_dor*BP_dor; Flow_lu_ar_dor is "outflow lung dextorphan";
  Flow_ar_pa_dor: Car_dor => Cpa_plasma_dor; Qpa*Car_dor; Flow_ar_pa_dor is "inflow pancreas dextorphan";
  Flow_pa_po_dor: Cpa_plasma_dor => Cpo_dor; Qpa*Cpa_plasma_dor*BP_dor; Flow_pa_po_dor is "outflow pancreas dextorphan";
  Flow_ar_sp_dor: Car_dor => Csp_plasma_dor; Qsp*Car_dor; Flow_ar_sp_dor is "inflow spleen dextorphan";
  Flow_sp_po_dor: Csp_plasma_dor => Cpo_dor; Qsp*Csp_plasma_dor*BP_dor; Flow_sp_po_dor is "outflow spleen dextorphan";
  Flow_ar_re_dor: Car_dor => Cre_plasma_dor; Qre*Car_dor; Flow_ar_re_dor is "inflow rest dextorphan";
  Flow_re_ve_dor: Cre_plasma_dor => Cve_dor; Qre*Cre_plasma_dor*BP_dor; Flow_re_ve_dor is "outflow rest dextorphan";
  KI__DEXEX: Cki_plasma_dex => Aurine_dex; KI__DEXEX_k*Vki_tissue*Cki_plasma_dex; KI__DEXEX is "DEX urinary excretion";
  KI__DOREX: Cki_plasma_dor => Aurine_dor; KI__DOREX_k*Vki_tissue*Cki_plasma_dor; KI__DOREX is "DOR excretion";
  LI__DEXCYP2D6: LI__dex => LI__dor; LI__DEXCYP2D6_Vmax*Vli_tissue*LI__cyp2d6_activity/(1 + LI__qui_ext/LI__DEXCYP2D6_Ki_qui)*LI__dex/(LI__DEXCYP2D6_Km_dex + LI__dex); LI__DEXCYP2D6 is "DEX CYP2D6";  // modifiers: LI__qui_ext
  LI__DEXCYP3A4_2: LI__dex => LI__dor; LI__DEXCYP3A4_Vmax_dor*Vli_tissue*LI__DEXCYP3A4_activity*LI__dex/(LI__DEXCYP3A4_Km_dex_dor + LI__dex); LI__DEXCYP3A4_2 is "DEX DEXCYP3A4 2";
  // CYP3A4 mediated conversion of DEX is responsible for the first-pass metabolism of DEX to MEM/MM3.
  LI__DEXCYP3A4: LI__dex => ; DEXCYP3A4_Vmax*LI__DEXCYP3A4_activity*Vli_tissue*LI__dex/(DEXCYP3A4_Km_dex + LI__dex); LI__DEXCYP3A4 is "DEX CYP3A4";
  LI__DEXIM: Cli_plasma_dex => LI__dex; LI__DEXCYP2D6_Vmax*LI__DEXIM_f*Vli_tissue*Cli_plasma_dex/(LI__DEXIM_Km_dex + Cli_plasma_dex); LI__DEXIM is "DEX import";
  LI__DOREX: LI__dor => Cli_plasma_dor; LI__DEXCYP2D6_Vmax*LI__DOREX_f*Vli_tissue*LI__dor/(LI__DOREX_Km_dor + LI__dor);
  // Vmax of export is defined relative to the `CYP3A4_Vmax` to ensure that the transport is fast relative to the absorption. This works because the `CYP3A4_Vmax` is on the same scale as the maximal absorption rate.
  GU__DEXEX: Cgu_tissue_dex => Cgu_plasma_dex; DEXCYP3A4_Vmax*GU__DEXEX_f*Vgu_tissue*Cgu_tissue_dex/(GU__DEXEX_Km_dex + Cgu_tissue_dex); GU__DEXEX is "DEX export";
  // CYP3A4 mediated conversion of DEX is responsible for the first-pass metabolism of DEX, `dextromethorphan (DEX) -[CYP3A4]-> 3-methoxymorphinan (MEM/MM3)`.First pass can occur in intestine and liver and both enzymes are modeled via the same parameters (Km, Vmax).CYP3A4 inhibition/activation can be implemented by changing the `CYP3A4_activity`, e.g., grapefruit juice selectively inhibits only the intestinal CYP3A4.
  GU__DEXCYP3A4: Cgu_tissue_dex => ; DEXCYP3A4_Vmax*GU__DEXCYP3A4_activity*Vgu_tissue*Cgu_tissue_dex/(Cgu_tissue_dex + DEXCYP3A4_Km_dex); GU__DEXCYP3A4 is "DEX CYP3A4";

  // Unit definitions:
  unit mmole = 1e-3 mole;
  unit min = 60 second;
  unit m = metre;
  unit m2 = metre^2;
  unit mM = 1e-3 mole / litre;
  unit mmole_per_min = 1e-3 mole / (60 second);
  unit mmole_per_min_l = 1e-3 mole / (60 second * litre);
  unit litre_per_min = litre / (60 second);
  unit per_min = 1 / (60 second);
  unit kg = kilogram;
  unit s = second;
  unit mg = 1e-3 gram;
  unit ml = 1e-3 litre;
  unit hr = 3600 second;
  unit per_hr = 1 / (3600 second);
  unit cm = 0.01 metre;
  unit mg_per_l = 1e-3 gram / litre;
  unit mg_per_g = 1e-3 gram / gram;
  unit mg_per_hr = 1e-3 gram / (3600 second);
  unit l_per_min = litre / (60 second);
  unit l_per_min_kg = litre / (60 second * kilogram);
  unit l_per_hr = litre / (3600 second);
  unit l_per_kg = litre / (1000 gram);
  unit l_per_ml = litre / (1e-3 litre);
  unit g_per_mole = gram / mole;
  unit m2_per_kg = metre^2 / (1000 gram);
  unit mg_per_min = 1e-3 gram / (60 second);
  unit mmole_per_hr = 1e-3 mole / (3600 second);
  unit mmole_per_l = 1e-3 mole / litre;
  unit mmole_per_min_kg = 1e-3 mole / (60 second * 1000 gram);
  unit mmole_per_hr_ml = 1e-3 mole / (3600 second * 1e-3 litre);
  unit ml_per_s = 1e-3 litre / second;
  unit ml_per_s_kg = 1e-3 litre / (second * 1000 gram);
  unit ml_per_l = 1e-3 litre / litre;
  unit mulitre_per_g = 1e-6 litre / gram;
  unit mul_per_min_mg = 1e-6 litre / (60 second * 1e-3 gram);
  unit min_per_hr = 60 second / (3600 second);
  unit s_per_min = second / (60 second);
  unit min_per_day = 60 second / (86400 second);
  unit mg_per_day = 1e-3 gram / (86400 second);
  unit per_min_kg = 1 / (60 second * 1000 gram);
  unit KI__mg = 1e-3 gram;
  unit KI__g_per_mole = gram / mole;
  unit LI__mg = 1e-3 gram;
  unit LI__g_per_mole = gram / mole;
  unit GU__kg = kilogram;
  unit GU__l_per_min = litre / (60 second);
  unit GU__l_per_min_kg = litre / (60 second * 1000 gram);
end
