// SBML level 3 version 1

model dex_intestine(DEXCYP3A4_Vmax, DEXCYP3A4_Km_dex, Vext, Vin, dex_ext, dex)
  // dex_intestine
  // Description
  // Dextormethorphan (DEX) intestine/gut model.
  // Orally applied DEX is absorbed via the intestine (see `absorption` in whole-body model). Within the intestinal wall part of the DEX can be metabolized via CYP3A4 mediated first-pass metabolism (the metabolic product of the reaction MEM is not part of the model), resulting in a reduced bioavailability of DEX.
  // All objects with ports are replaced in the coupling to the whole-body model.
  // The content of this model has been carefully created in a manual research effort.
  // This file has been created by Matthias König.
  // Terms of use
  // Copyright © 2021 Matthias König.
  // Redistribution and use of any part of this model, with or without modification, are permitted provided that the following conditions are met:
  // Redistributions of this SBML file must retain the above copyright notice, this list of conditions and the following disclaimer.
  // Redistributions in a different form must reproduce the above copyright notice, this list of conditions and the following disclaimer in the documentation and/or other materials provided with the distribution.
  // This model is distributed in the hope that it will be useful, but WITHOUT ANY WARRANTY; without even the implied warranty of MERCHANTABILITY or FITNESS FOR A PARTICULAR PURPOSE.
  // model units - substance: mmole, time: min, volume: litre, area: m2, length: m, extent: mmole

  // Compartments:
  compartment Vext = 4 litre; Vext is "plasma";  // SBO:0000290 ncit:C13356 BTO:0000131
  compartment Vin = 1 litre; Vin is "intestine";  // SBO:0000290 FMA:45615 BTO:0000545 ncit:C12736

  // Species:
  species dex_ext in Vext = 0; dex_ext is "dextormethorphan (plasma)";  // SBO:0000247 CHEBI:4470 ncit:C62022 inchikey:MKXZASYAUGDDCJ-NJAFHUGGSA-N
  // appearance via absorption defined in (whole-body model)
  species dex in Vin = 0; dex is "dextormethorphan (intestine)";  // SBO:0000247 CHEBI:4470 ncit:C62022 inchikey:MKXZASYAUGDDCJ-NJAFHUGGSA-N

  // Parameters:
  DEXCYP3A4_Vmax = 1 mmole_per_min_l; DEXCYP3A4_Vmax is "DEX CYP3A4 Vmax";  // SBO:0000186
  DEXCYP3A4_Km_dex = 286 mM; DEXCYP3A4_Km_dex is "DEX CYP3A4 Km";  // SBO:0000027
  DEXEX_f = 390 dimensionless; DEXEX_f is "scaling factor DEX export relative to metabolic reactions";
  DEXEX_Km_dex = 0.1 mM; DEXEX_Km_dex is "DEX export Km";  // SBO:0000027
  DEXCYP3A4_activity = 1 dimensionless;

  // Reactions:
  // Vmax of export is defined relative to the `CYP3A4_Vmax` to ensure that the transport is fast relative to the absorption. This works because the `CYP3A4_Vmax` is on the same scale as the maximal absorption rate.
  DEXEX: dex => dex_ext; DEXCYP3A4_Vmax*DEXEX_f*Vin*dex/(DEXEX_Km_dex + dex); DEXEX is "DEX export";  // SBO:0000655
  // CYP3A4 mediated conversion of DEX is responsible for the first-pass metabolism of DEX, `dextromethorphan (DEX) -[CYP3A4]-> 3-methoxymorphinan (MEM/MM3)`.First pass can occur in intestine and liver and both enzymes are modeled via the same parameters (Km, Vmax).CYP3A4 inhibition/activation can be implemented by changing the `CYP3A4_activity`, e.g., grapefruit juice selectively inhibits only the intestinal CYP3A4.
  DEXCYP3A4: dex => ; DEXCYP3A4_Vmax*DEXCYP3A4_activity*Vin*dex/(dex + DEXCYP3A4_Km_dex); DEXCYP3A4 is "DEX CYP3A4";  // SBO:0000176

  // Unit definitions:
  unit mmole = 1e-3 mole;
  unit min = 60 second;
  unit m = metre;
  unit m2 = metre^2;
  unit mM = 1e-3 mole / litre;
  unit mmole_per_min = 1e-3 mole / (60 second);
  unit mmole_per_min_l = 1e-3 mole / (60 second * litre);
  unit litre_per_min = litre / (60 second);
  unit per_min = 1 / (60 second);
  unit kg = kilogram;
  unit l_per_min = litre / (60 second);
  unit l_per_min_kg = litre / (60 second * 1000 gram);
end
